# Prime numbers over 19: 23, 29, 31, 37, 41, 43, 47, 53, 59, 61, 67, 71, 73, 79, 83, 89, 97, 101, 103, 107, 109 og 113
label nloop
variable confignr loop 21 #41 43 47 53 #29 31 37 #### DANGER OF CRASHING! MAY ONLY GET THE FIRST OF THESE!
variable spacing equal 5
variable sigma_atom equal 1.5 # Vary this?   # FOR FRIGG'S SAKE, REMEMBER TO MAKE THE FOLDER FIRST!!!!
#variable pmass equal 1.5#1.5  # Mass of the particle # Is this reasonable?
variable density equal 3/(4*PI)
variable pmass equal 4*PI*${sigma_atom}^3/3*density

######################### Setting the sytem ####################################
## Getting conversion factors and constructing the dielectric
# Neccessary quantities in lj units:
variable T equal 3      # The temperature in LJ units
# Our length unit (set):
variable lengthunit equal 1e-9   # In SI
variable convert_energy_nanounits_to_ljunits equal 1e21
# Physical constants in SI:
variable kb equal 1.38064852e-23
variable epsilon0 equal 8.85e-12
variable elementalcharge equal 1.602176634e-19
variable T0 equal 310.0 # The temperature we want in K  # We will use this to find the energy unit, which we in turn will use to find the dielectric correction
# Converting
variable energyunit equal ${T0}/T*${kb}
#variable energyunit_ljinnano equal ${convert_energy_nanounits_to_ljunits}*${energyunit} # For conversion from units nano to units lj
variable energyunit_ljinnano equal 1.426670137333333  #### TRIED TO CALCULATE IN LAMMPS, BUT IT DIDN'T WORK ## For T = 3, T0 = 310
variable qratio equal 12.719558614248152
#variable qratio equal ${elementalcharge}/sqrt(4*PI*${epsilon0}*${lengthunit}*${energyunit})
#variable conversionfactor equal 1.0/${qratio}^2
variable conversionfactor equal 0.008818190747174473 #0.006180959786301432 (forgot to divide by E)
variable ljepsilon_standard equal 1.042
variable ljepsilon equal ${ljepsilon_standard}/${energyunit_ljinnano}
variable ljcutoff equal 1.122 # Vary this?
variable ljsigma equal 1.0 # What should this be?
variable atomcutoff equal 1.122*${sigma_atom}

print 'energyunit_ljinnano: ${energyunit_ljinnano}'

## Set variables
variable theta0 equal 180.0
variable Kangle equal 20.0/${energyunit_ljinnano}
variable Kbond equal 200.0/${energyunit_ljinnano}
variable kappa equal 1.0
variable debyecutoff equal 3.0
variable charge equal -1                  # The dielectric will be changed to set the Debye interaction to the correct value
variable dt equal 0.00045                 # This timestep seems to work well for our simulations (standard ljunits timestep is too big)
variable M equal 9
variable N equal 101
#variable vzmin equal -0.01
#variable vzmax equal -0.00000001

# Setting system properties
units lj
dimension 3
boundary p p p
atom_style full
pair_style lj/cut/coul/debye ${kappa} ${debyecutoff} #
bond_style harmonic
angle_style harmonic


# Importing the system:
#log log.help # Did not help.
read_data /home/kine/Projects_PhD/P2_PolymerMD/Planar_brush/Diffusion_bead_near_grid/Initial_configurations/data.bead_wsubstr_eq_N909_d${spacing}_charge${charge}_mass1_file${confignr}

#read_data /home/kine/Projects_PhD/P2_PolymerMD/Planar_brush/Diffusion_bead_near_grid/Bulk_substrate/Bulkdiffusion_withsubstrate_ljunits_Langevin_scaled_T3_sect_placeexact_ljepsilon0.730372054992096_ljcut1p122/Spacing${spacing}/Initial_configurations/data.wsubstr_eq_N909_d5_charge-1_mass1_file1 # Too long!
#data.chaingrids_substrate_N909_Nchains9_Ly3_gridspacing${spacing}_twofixed_charge${charge}_mass1_file${confignr} # New file system!
#read_data /home/kine/Projects_PhD/P2_PolymerMD/Planar_brush/Diffusion_bead_near_grid/Bulk_substrate/Bulkdiffusion_withsubstrate_ljunits_Langevin_scaled_T3_sect_placeexact_ljepsilon0.730372054992096_ljcut1p122/Spacing${spacing}/Initial_configurations/data.chaingrids_substrate_N909_Nchains9_Ly3_gridspacing${spacing}_twofixed_charge${charge}_mass1_file${confignr}  # Too long!
#log /home/kine/Projects_PhD/P2_PolymerMD/Planar_brush/Diffusion_bead_near_grid/Brush/Quadr_M9N101_ljunits_Langevin_scaled_Kangle${Kangle}_Kbond${Kbond}_debye_kappa${kappa}_debcutoff${debyecutoff}_chargeel${charge}_effdiel${conversionfactor}_T$T_ljcut1p122/Spacing${spacing}/Sigma_bead_${sigma_atom}/log.pmass${pmass}_seed${seed} #_correctconversions_twofirst_are_fixed #The file name gets too long
# Do I even use the log-file anymore?


velocity all create $T 87287 # I can reset the velocities.

variable sigma_inter equal (${sigma_atom}+${ljsigma})/2
variable cutoff_inter equal 1.122*${sigma_inter}

pair_coeff 1 1 ${ljepsilon} ${ljsigma} ${ljcutoff} ${debyecutoff}
pair_coeff 1 2 ${ljepsilon} ${ljsigma} ${ljcutoff} ${debyecutoff}
pair_coeff 2 2 ${ljepsilon} ${ljsigma} ${ljcutoff} ${debyecutoff}
pair_coeff * 4 ${ljepsilon} ${ljsigma} ${ljcutoff} 0               # Er det greit å sette disse generelt her? Kan vel resette etterpå?
pair_coeff * 3 ${ljepsilon} ${sigma_inter} ${cutoff_inter} 0
bond_coeff * ${Kbond} 1.0
angle_coeff * ${Kangle} ${theta0}

############################ Prepare simulation #####################################

# Minimize really messes up the structure
#minimize 1.0e-4 1.0e-6 100 1000

group movingmonomers type 2 # This is superfluous.

neighbor 1.0 bin
#neigh_modify once no every 1 delay 0 check yes

dielectric ${conversionfactor}
timestep ${dt}

#compute bendingenergy all pe angle
#compute stretchingenergy all pe bond
#compute coulombenergy all pe pair

########################### Add atom info ##############################################

mass 3 ${pmass}

group freeatom type 3
group movingatoms type 2 3

variable scalefac equal ${pmass}/${sigma_atom}

fix lgvfix movingatoms langevin $T $T 100.0 699483 scale 3 ${scalefac}
fix 1 movingatoms nve

############################ Run ##############################################

dump walltest freeatom custom 10 /home/kine/Projects_PhD/P2_PolymerMD/Planar_brush/Diffusion_bead_near_grid/Brush/Quadr_M9N101_ljunits_Langevin_scaled_Kangle${Kangle}_Kbond${Kbond}_debye_kappa${kappa}_debcutoff${debyecutoff}_chargeel${charge}_effdiel${conversionfactor}_T$T_ljcut1p122/Spacing${spacing}/Sigma_bead_${sigma_atom}/freeatom_density${density}_confignr${confignr}.lammpstrj id type mol xu yu zu vx vy vz # Maybe skip this? Only use it if I need to, at least.
print 'YO!!!!!!!!!!!!!!!!!!!!!!!!!!!!!!!!!!!!!!!!!!!!!!!!!!!!!!! Spacing: ${spacing}; density: ${density}; psigma: ${sigma_atom}; pmass: ${pmass}; confignr${confignr}'
dump walltest_all all custom 700000 /home/kine/Projects_PhD/P2_PolymerMD/Planar_brush/Diffusion_bead_near_grid/Brush/Quadr_M9N101_ljunits_Langevin_scaled_Kangle${Kangle}_Kbond${Kbond}_debye_kappa${kappa}_debcutoff${debyecutoff}_chargeel${charge}_effdiel${conversionfactor}_T$T_ljcut1p122/Spacing${spacing}/Sigma_bead_${sigma_atom}/all_density${density}_confignr${confignr}.lammpstrj id type mol xu yu zu vx vy vz # Maybe skip this? Only use it if I need to, at least.

run 800000

clear
next confignr
jump SELF nloop
